// COMSOL Multiphysics 6.2.0.290 model "DP.mph"
// Outline of the model tree

Parameters
  L = 20[mm]  // 厚度
  c0 = 5[mmol/L]  // 入流浓度
  k0 = 1.6e-10[m/s]  // 初始渗透系数
  kf = 2e-10[m/s]  // 最终渗透系数
  h0 = 3[m]  // 入流压力
  hw = 0.75[m]  // 水位高度
  ruo_0 = 1.285[g/cm^3]  // 初始密度
  wf = 230[%]  // 初始含水率
  k_d = 15[ml/g]  // 分配系数
  e0 = Gs*(1+wf)/(ruo_0[cm^3/g])-1  // 初始孔隙比
  n0 = e0/(1+e0)  // 初始孔隙率
  Gs = 2.6  // 比重
  p_0 = 30[kPa]  // 实际作用边界的水头，不是达西场的水头
  D = 5e-10[m^2/s]  // 扩散系数
  ruo_d = ruo_0/(1+wf)  // 干密度
  A = 3848.5[mm^2]  // 土柱横截面积

Variables
  var1 "变量 1"
    k = (k0-kf)/(1+(c1/0.05[mol/L])^3.5)+kf
    c1 = (c-0.001[mol/m^3])*(c>0.001[mol/m^3])+0.001[mol/m^3]

Geometry
  geom1 "几何 1" (1D, length unit mm)
    i1: Interval "线段间隔 1" | coord = {0, L}
    fin: Finalize "形成联合体"

Physics
  dl: PorousMediaFlowDarcy "达西定律" on all domains
    dependent variable p0
    PhysicalModelProperty.Ac = A
    GravityEffects.IncludeGravity = 0
    porous1: PorousMedium "多孔介质 1" (default)
      fluid1: FluidPorousMedium "流体 1" (default) | fluidType = incompressible; rhoref_mat = userdef; rhoref = 1000[kg/m^3]
      pm1: PorousMatrixPorousMedium "多孔基体 1" (default)
        permeabilityModelType = conductivity
        K = k
        epsilon_mat = userdef
        epsilon = n0
    nf1: NoFlow "无流动 1" (default)
    init1: init "初始值 1" (default) | InitType = p; p = 50[kPa]; Hp = 0
    pr1: Pressure "压力 1" on boundaries 1 | p0 = p_0
    pr2: Pressure "压力 2" on boundaries 2
    dporo1: DualPorosityMedium "双孔介质 1" on domains 1 | storageModelType = fromrhoeps; alphaw = 1e-7
      fluid1: FluidPorousMedium "流体 1" (default) | fluidType = incompressible; rho_mat = userdef; rho = 1000[kg/m^3]
      macro1: MacroporesPorousMedium "大孔隙 1" (default)
        theta_M = 0.6
        permeabilityModelType = conductivity
        K = k0
        epsilon_mat = userdef
        epsilon = n0*0.6
      micro1: MicroporesPorousMedium "微孔隙 1" (default)
        epsilon_mat = userdef
        epsilon = n0*0.4
        setInitialValue = userdef
  tds: DilutedSpeciesInPorousMedia "多孔介质中的稀物质传递" on all domains
    dependent variable c
    EquationForm.form = Automatic
    Ac.Ac = A
    SpeciesActivity.SpeciesActivity = Ideal
    TransportMechanism.Convection = 1
    TransportMechanism.MassTransferInPorousMedia = 1
    porous1: PorousMedium "多孔介质 1" (default)
      fluid1: FluidPorousMedium "流体 1" (default)
        u_src = root.comp1.dl.u
        DiffusionCoefficientSource = chem
        Dchem_c = D
        FluidDiffusivityModelType = UserDefined
      pm1: PorousMatrixPorousMedium "多孔基体 1" (default) | poro_mat = userdef; poro = n0
      ads1: Adsorptions "吸附 1" on all domains
        densityType = dryBulkDensity
        rho_db_mat = userdef
        rho_db = ruo_d
        rho_sp_mat = userdef
        rho_sp = ruo_0
        species = 1
        SorptionType = UserDefined
        cP = c0*k_d
    nflx1: NoFlux "无通量 1" (default)
    init1: init "初始值 1" (default)
    conc1: Concentration "浓度 1" on boundaries 1 | species = 1; c0 = c0

Mesh
  mesh1 "网格 1" (physics-controlled)
    size: MeshSizeDefault "大小" | hauto = 3

Studies
  std1 "研究 1"
    time: Transient "瞬态" | tunit = d; tlist = range(0,1,30)

Solver configurations
  sol1 "解 1" (study std1)
    v1: Variables "因变量 1"
    t1: Time "瞬态求解器 1" | tlist = range(0,1,30); rtol = 0.005; maxorder = 2; stabcntrl = on
      fc1: FullyCoupled "全耦合 1"
        linsolver = d1
        maxiter = 8
        damp = 0.9
        jtech = once
        stabacc = aacc
        aaccdim = 5
        aaccmix = 0.9
        aaccdelay = 1
      d1: Direct "直接，压力 (dl) (已合并)" | linsolver = pardiso; pivotperturb = 1.0E-13

Datasets
  dset1: Solution | solution = sol1
  cpt1: CutPoint1D "出流端" | data = dset1; pointx = L

Plots
  pg3: PlotGroup1D "浓度" | data = dset1
    ptgr1: PointGraph "出流端" | data = cpt1; expr = c/c0
  pg4: PlotGroup1D "渗透系数" | data = dset1
    ptgr1: PointGraph "出流端" | data = cpt1; expr = k